// SBML level 3 version 1
import "unit_definitions.xml";

model cell(c, glc, Vmax)
  // a single cell
  // model units - substance: mole, time: min, volume: litre, extent: mole

  // Compartments:
  compartment c = 1 litre; c is "cell volume";

  // Species:
  species glc in c = 1; glc is "glucose of the cell";

  // Parameters:
  k = 0.2 per_min; k is "rate constant of the cell";
  Vmax = 2 mole_per_min; Vmax is "maximal rate of the cell";

  // Reactions:
  sink: glc => ; k*glc*c; sink is "consumption of glucose";

  // Unit definitions:
  unit min = 60 second; min is "minute";
  unit per_min = 1 / (60 second); per_min is "per minute";
  unit mole_per_min = mole / (60 second); mole_per_min is "mole per minute";
end

model tissue()
  // a tissue built from one cell
  // model units - substance: mole, time: min, volume: litre, extent: mole

  // Sub-modules:
  cell_in_tissue: cell(); cell_in_tissue is "the cell of the tissue";

  // Compartments:
  compartment t = 1 litre; t is "tissue volume";

  // Unit definitions:
  unit min = 60 second; min is "minute";
end

model comp_deletion(medium)
  // Two cells and a tissue in one medium
  // Example of the composition machinery of the comp package: a medium holding two cells and a tissue.
  // The model definition cell is instantiated three times: twice directly, as the submodels cell1 and cell2, and once through the model definition tissue, which holds a cell of its own. The fourth submodel instantiates an external model definition, a document of unit definitions named with its checksum; the report does not read that document, so what its deletion removes stays a name.
  // The compartment medium replaces the compartment of every cell, so that the four instances share one volume, and the species glc replaces their glucose. The submodel cell1 loses its own rate constant and its sink reaction through two deletions, and the parameter k_total of this model records that it takes the place of the deleted constant.
  // model units - substance: mole, time: min, volume: litre, extent: mole

  // Sub-modules:
  cell1: cell(); cell1 is "first cell, without its own rate constant"; delete cell1.k; delete cell1.meta_sink;
  cell2: cell(); cell2 is "second cell, on its own time and extent scale";
  tissue1: tissue(); tissue1 is "tissue holding a cell of its own";
  unit_library: units(); unit_library is "unit definitions of another document"; delete unit_library.mg_per_day;

  // Compartments:
  compartment medium = 1 litre; medium is "shared medium"; cell1.c is medium; cell2.c is medium; tissue1.cell_in_tissue is medium;

  // Species:
  species glc in medium = 5; glc is "glucose"; cell1.glc is glc; cell2.glc is glc;

  // Parameters:
  k_total = 0.1 per_min; k_total is "rate constant of the medium"; cell1.None is k_total;
  Vmax_shared = 1 mole_per_min; Vmax_shared is "maximal rate of the medium"; cell2.Vmax is Vmax_shared;
  f_amount = 1 dimensionless; f_amount is "conversion factor of the amounts of cell1";
  f_time = 1 dimensionless; f_time is "conversion factor of the time of cell2";
  f_extent = 1 dimensionless; f_extent is "conversion factor of the extent of cell2";
  glc_amount has mole; glc_amount is "amount of glucose in the medium";

  // Assignment rules:
  glc_amount := glc*medium;

  // Unit definitions:
  unit min = 60 second; min is "minute";
  unit per_min = 1 / (60 second); per_min is "per minute";
  unit mole_per_min = mole / (60 second); mole_per_min is "mole per minute";
end
