// SBML level 3 version 2
// Example model of SBML4Humans for the objects of SBML core which carry their own attributes: a constraint with a message, an event with a trigger, a priority and a delay, a kinetic law with local parameters and a unit definition built from several units.

model constraint_event()
  // model with a constraint, an event and local parameters
  // Model with a constraint, an event and local parameters
  // A single Michaelis-Menten reaction converts S1 into S2 in the compartment cell. The rate law keeps its constants Km and Vmax as local parameters, so they belong to this reaction alone.
  // A constraint states that S1 stays below S1_max and carries the message which a simulator shows when it does not. The event E1 adds a dose of S1 five minutes after the twentieth minute and switches the reaction off; its trigger, its priority and its delay each carry their own identifier, SBO term and notes.
  // Terms of use
  // This file was written for the SBML4Humans report and is distributed under the Creative Commons Attribution 4.0 International License.
  // hasTaxon taxonomy:9606 pubmed:31219795
  // isDescribedBy pubmed:31219795
  // model units - substance: mmole, time: min, volume: litre, extent: mmole

  // Compartments:
  compartment cell = 1 litre;

  // Species:
  species substrate in cell = 8;
  species product in cell = 0;

  // Parameters:
  S1_max = 10 mM; S1_max is "upper bound of the substrate";
  dose = 5 mM; dose is "dose added by the event";
  active = 1 dimensionless; active is "switch of the reaction";
  t_dose = 20 min; t_dose is "time of the dose";
  t_delay = 5 min; t_delay is "time the dose needs to reach the compartment";

  // Reactions:
  conversion_of_S1_into_S2: substrate => product; active*cell*(Vmax*substrate/(Km + substrate));
    Vmax = 1 mmole_per_min_l; Km = 2 mM;

  // Events:
  E1: at (t_delay) after (time >= t_dose), priority = 1, t0=false, fromTrigger=false: substrate = substrate + dose, active = 0; E1 is "dose of S1 which switches the reaction off";

  // Constraints:
  constraint substrate < S1_max;  // The substrate S1 left the range of the rate law of R1: it is above S1_max and the results from here on are not valid.

  // Unit definitions:
  unit min = 60 second;
  unit mmole = 1e-3 mole;
  unit mM = 1e-3 mole / litre; mM is "mmole/litre";
  unit mmole_per_min_l = 1e-3 mole / (60 second * litre); mmole_per_min_l is "mmole/min/litre";
end
