// SBML level 3 version 2

model list_of()
  // ListOf containers with attributes of their own
  // Every ListOf container of SBML derives from SBase: a list may carry a metaid, an SBO term, notes and an annotation of its own, and from Level 3 Version 2 on an id and a name. This model states them on several of its lists, and explains a list which is empty.

  // Compartments:
  compartment cell = 1;

  // Species:
  species S1 in cell = 10;
  species S2 in cell = 0;

  // Parameters:
  k1 = 0.1 per_second;

  // Reactions:
  J0: S1 => S2; cell*k1*S1;

  // Unit definitions:
  unit per_second = 1 / second;
end
