// SBML level 3 version 2

model validation()
  // model with validation errors and warnings
  // Example model with an error and warnings of the validation of libsbml: the parameter x is set by an assignment rule and determined by an algebraic rule (overdetermined model), the compartment and the parameter k1 carry SBO terms of the wrong branch, and k1 and the literal numbers of the math declare no units.
  // model units - substance: mole, time: second, volume: litre, extent: mole

  // Compartments:
  compartment cell = 1 litre;

  // Species:
  substanceOnly species A in cell = 10;
  substanceOnly species B in cell = 0;

  // Parameters:
  k1 = 0.1; k1 is "rate constant";
  x has dimensionless;

  // Assignment rules:
  x := 1;

  // Algebraic rules:
  0 = x - 1;

  // Reactions:
  A_to_B: A => B; k1*A;
end
